# Beregning af afsat effekt i doseringspumpe:
I_1 := 3 A
V_1 := 12 V
P_1 := I_1*V_1 = 36 W
# Beregning af indre modstand:
R_1 := V_1/I_1 = 4 Ω
# Udregning af afsat effekt:
# Drain to Source modstand:
R_DS := 11*10^-3 Ω
# Strøm der trækkes af relæet:
I_1 = 3 A
# Junction-to-Ambient modstand:
R_θJA := 62 °C*1/W
# Max junction temp:
Temp_jun := 175 °C
# Ambient temp:
Temp_amb := 25 °C
# Beregning af effekt afsat af transistoren ved operaton:
p_afsat := R_DS*I_1^2 = 99 mW
Temp_max := (Temp_jun - Temp_amb)/R_θJA = 447.561 mW
