# Analyse af 12V og 5V:
V_1 := 12 V
V_2 := 5 V
V_3 := 12*sqrt(2)*V
V_zener1 := 6.2 V
V_zener2 := 2.4 V
R_2 := 10 kΩ
R_1 := 1 kΩ
R_3 := 10 kΩ
C_1 := 1 nF
# Spændingsdeler:
V_zener1 == V_1/(R_2 + R_4_1)*R_4_1 solve, R_4_1 → 10.6896551724*kΩ = 10.6897 kΩ
V_zener2 == V_2/(R_2 + R_4_2)*R_4_2 solve, R_4_2 → 9.23076923077*kΩ = 9.23077 kΩ
# Forstærkning i LF356N:
A_DC := 1 + (R_1 + 1/(2*π*0.01*Hz*C_1))/R_3 = 1591551
A_1kHz := 1 + (R_1 + 1/(2*π*1*kHz*C_1))/R_3 = 17.0155
A_10kHz := 1 + (R_1 + 1/(2*π*10*kHz*C_1))/R_3 = 2.69155
A_100kHz := 1 + (R_1 + 1/(2*π*100*kHz*C_1))/R_3 = 1.25915
A_10MHz := 1 + (R_1 + 1/(2*π*10*MHz*C_1))/R_3 = 1.10159
# Effekt afsættelse i FET:
I_5V := 2.7 A
I_12V := 3.5 A
P_5V := (V_3 - V_2)*I_5V = 32.3205 W
P_12V := (V_3 - V_1)*I_12V = 17.397 W
# Udregning af belastning til test af PSU:
R_5V := 5 V/(2.7 A) = 1.85185 Ω
R_12V := 12 V/(3.5 A) = 3.42857 Ω
R_5V_realisering := (5^-1 + 5^-1 + 10^-1 + 10^-1)^-1 = 1.66667
R_12V_realisering := (10^-1 + 10^-1 + 10^-1)^-1 = 3.33333
