# Udregning af strømforbrug:
# Effektoptagelse:
P_1 := 6 V*A
# Forsyningsspænding:
V_1 := 12 V
# Beregning af strøm der trækkes af relæet:
I_1 := I_1*V_1 == P_1 solve, I_1 → A/2 = 500 mA
# Udregning af afsat effekt:
# Drain to Source modstand:
R_DS := 11*10^-3 Ω
# Strøm der trækkes af relæet:
I_1 = 0.5 A
# Junction-to-Ambient modstand:
R_θJA := 62 °C*1/W
# Max junction temp:
Temp_jun := 175 °C
# Ambient temp:
Temp_amb := 25 °C
# Beregning af effekt afsat af transistoren ved operaton:
p_afsat := R_DS*I_1^2 = 2.75 mW
Temp_max := (Temp_jun - Temp_amb)/R_θJA = 447.561 mW
