# Transformer test:
# Short circuit:
S_rated := 160 V*A
V_rated := 230 V
I_max := S_rated/V_rated = 0.695652 A
V_sc := 18 V
P_sc := I_max*V_sc = 12.5217 W
R_eq1 := P_sc/I_max^2 = 25.875 Ω
|Z_eq1| == V_sc/I_max == 18 V/(0.7 A) == 25.875 Ω
X_eq1 == |sqrt(|Z_eq1|^2 - R_eq1^2)| == |sqrt((25.875 Ω)^2 - (25.875 Ω)^2)| == 0
Z_eq1 == R_eq1 + 1i*X_eq1 == (25.875 + 1i*0)*Ω == 25.875 Ω
# Open circuit:
I_oc := 10 mA
P_oc := I_oc*V_rated = 2.3 W
N_1 := 12
N_2 := 230
V_1 := N_1/N_2*V_rated = 12 V
G_c := P_oc/V_1^2 = 0.0159722 S
|Y_m| == (N_2/N_1)*I_oc/V_1 == (230/12)*10*mA/(12 V) == 16*mS
B_m == sqrt(|Y_m|^2 - G_c^2) == sqrt((16*mS)^2 - (16*mS)^2) == 0
Y_m == G_c + 1i*B_m == 16*mS + 1i*0 == 16*mS
